# AguaClara Water Treatment Plants
# Automated Design
# User Inputs:
HW_Sed := 1.55 m
# Design References
# [reference: UserInputs- test.xmcd]
# [reference: DesignAssumptions-test.xmcd]
# [reference: MathFunctions.xmcd]
# [reference: PipeDatabase.xmcd]
# [reference: MinorLossCoefficients.xmcd]
# [reference: FluidsFunctions.xmcd]
# Inlet Channel:
# [reference: Inlet Channel.xmcd]
W_InletChannel = 1.07034 m
L_Channel = 12.295 m
ND_SedPipeEntrance = 12 in
Q_Plant = 792.5 gal/min
# Sedimentation Tanks:
# [reference: Sedimentation.xmcd]
N_SedTanks = 10
H_SedBelow = 0.8016 m
H_SedBelowSlope = 0.8016 m
H_SedBelowStraight = 0 m
H_SedBetween
HW_Sed = 1.55 m
H_Sed = 1.65 m
L_Sed = 5.71682 m
ND_SedPipeEntrance = 12 in
# Sedimentation Tank Sludge Drain:
# [reference: SludgeDrain.xmcd]
N_SedSludgeOrifices = 57
ND_SedSludge = 3 in
Q_SludgeDrainInitial = 637.701 L/min
D_SedSludgeOrifice = 0.25 in
# Sedimentation Tank Inlet Slopes:
# [reference: Sed. Inlet Slopes-test.xmcd]
B_SedInlet = 3.80249 cm
H_SedInlet = 4.96379 cm
AN_SedTopInlet = 60 deg
AN_SedBottom = 10 deg
L_SedTopInlet = 1.0795 m
A_SedInlet = 2573.53 cm^2
H_SedTopInlet = 104.877 cm
H_SedInletSlopes = 0.864702 m
H_SedBottom = 0.0951725 m
# Sedimentation Tank Effluent Launder:
# [reference: Launder.xmcd]
N_SedLaunderOrifices = 68
Q_SedLaunderOrifices = 2.20584 L/min
# Exit Channel:
# [reference: Exit Channel.xmcd]
W_ExitChannel = 1.07034 m
ND_SedLaunder = 4 in
H_ExitChannel = 0.6984 m
L_SedLaunder = 3.42613 m
L_ExitChannel = 12.295 m
D_SedLaunderOrifice = 0.375 in
H_PltWeir = 0.464025 m
Z_SedLaunder = 1.45285 m
HW_ExitChannel = 0.5584 m
# Lamella:
# [reference: Lamella.xmcd]
L_SedPlate = 0.686008 m
B_SedPlate = 2.32573 cm
S_SedPlate = 2.02573 cm
N_SedPlates = 111
AN_SedPlate = 60 deg
V_SedC = 10.0242 m/day
V_SedUp = 70 m/day
H_SedPlate = 0.5941 m
H_SedAbove = 0.1543 m
# Flow Controller:
# [reference: FCM.xmcd]
N_Fcm = 6
ID_FcmTube = 4.318 mm
ID_FcmTube = 0.17 in
L_FcmTube = 257.565 cm
Q_FcmTubeMax = 374.992 mL/min
HL_FcmValve = 26.1255 cm
# Flocculator:
# [reference: Flocculation.xmcd]
W_FlocChannel = 0.53975 m
S_FlocBaffle = [0.38352; 0.458789; 0.608233; 1.56258] m
B_FlocBaffle = [0.38752; 0.462789; 0.612233; 1.56658] m
N_FlocBafflesMin = 19
HL_Floc = 7.85908 cm
X_FlocBaffles = [
    0.68975, 4.13924, 1.57758, 4.13924;
    1.07727, 3.52701, 3.14416, 2.57266;
    1.46479, 2.91477, 0, 0;
    1.85231, 1.34819, 0, 0;
    2.3151, 0, 0, 0;
    2.77789, 0, 0, 0;
    3.24068, 0, 0, 0;
    3.85291, 0, 0, 0
] m
HW_FlocStart = 1.62859 m
W_FlocPort = 1.56258 m
L_FlocBaffles = [
    1.16648, 0.941767, -0.012578, -0.012578;
    1.26648, 1.04177, 0.087422, 0.087422;
    1.16648, 0.941767, 0, 0;
    1.26648, 0.087422, 0, 0;
    1.09121, 0, 0, 0;
    1.19121, 0, 0, 0;
    1.09121, 0, 0, 0;
    1.04177, 0, 0, 0
] m
H_FlocPort = 0.53975 m
N_FlocBaffles = 16
Z_FlocBaffles = [
    0, 0, 0, 0;
    0.38352, 0.608233, 1.56258, 1.56258;
    0, 0, 0, 0;
    0.38352, 1.56258, 0, 0;
    0, 0, 0, 0;
    0.458789, 0, 0, 0;
    0, 0, 0, 0;
    0.608233, 0, 0, 0
] m
Gt_FlocMinFlow = 5964.17
N_FlocChannels = 4
# Entrance Tank:
# [reference: EntranceTank.xmcd]
ND_Lfom = 20 in
HL_Rm = 0.890239 cm
N_Lfom = 1
D_LfomOrifices = 52.3875 mm
Q_LfomErrorMax = 1.06657 %
N_LfomOrifices = [5; 4; 3; 2; 2; 1; 2; 2; 1; 1]
L_Et = 0.53975 m
W_Et = 0.53975 m
HW_EtMin = 0.2 m
HW_EtMax = 0.4 m
H_Et = 0.5 m
ZW_Et = 1.87859 m
# Any additional needed elevations should be calculated in the files above.
# AutoCAD References
# [reference: basics.xmcd]
# [reference: pipe.xmcd]
# [reference: tank.xmcd]
# [reference: lamina.xmcd]
# [reference: cross.xmcd]
# [reference: Tee.xmcd]
# [reference: elbow.xmcd]
# [reference: Sludge.xmcd]
# [reference: Channel.xmcd]
# [reference: Manifold.xmcd]
# [reference: SedTankslopes.xmcd]
# [reference: Sed Tank Inlet Slope.xmcd]
# [reference: chemicalstock.xmcd]
# [reference: Sedimentation Tank.xmcd]
# [component: inputs SedTank]
# [reference: Flocculation Tank.xmcd]
# [component: inputs FlocTank]
# [reference: Entrance Tank.xmcd]
# [component: inputs EntranceTank]
