# AguaClara Design Tool
Ti_wanted := 5 min
# [reference: BasicClientInputs.xmcd]
# [reference: ExpertInputs.xmcd]
Q_Plant = 0.006 m^3/s
# [reference: DesignAssumptions.xmcd]
# [reference: MathFunctions.xmcd]
# [reference: PipeDatabase.xmcd]
# [reference: MinorLossCoefficients.xmcd]
# [reference: FluidsFunctions.xmcd]
# [reference: Sedimentation Tank.xmcd]
# [reference: Floc Hopper - New Design.xmcd]
# [reference: FCM.xmcd]
# [reference: Flocculator 3.xmcd]
# [reference: Rapid Mix.xmcd]
# [reference: EntranceTankDim.xmcd]
# [reference: Materials List.xmcd]
# [reference: ChemStorageCylinders.xmcd]
Q_Plant = 0.006 m^3/s
# [reference: AutoCADMasterProgram.xmcd]
# [reference: Final Doser Redo.xmcd]
Q_Plant = 0.006 m^3/s
AC_FlocTank = [
    "-layer m floctank";
    "c t 91,91,91";
    "floctank";
    "  ";
    "_-view o t _zoom w 0.16,2.3,0.75093 -3.58857,5.23,1.99858 _box 0,2.46,0.75093 -3.42857,5.07,1.99858 _box 0.15,2.31,0.60093 -3.57857,5.22,1.99858 _subtract 0.15,2.31,0.60093  0,2.46,0.75093 ";
    "_box -3.57857,3,0.75093 0.15,3.15,1.99858";
    "_box -0.10396,3,1.29093 0,3.15,0.75093";
    "_subtract -3.57857,3,0.75093  -0.10396,3,1.29093 ";
    "_box -3.57857,3.69,0.75093 0.15,3.84,1.99858";
    "_box -3.42857,3.69,1.29093 -3.32462,3.84,0.75093"
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]
AC_SedTank =  # no stored result
AC_ChemTanks = ["-layer m alumtanks"; "c t 132,132,132"; "alumtanks"; "  "; "_-view o t"; "_cylinder 1.73028,3.82949,2.87819 0.39051 1.16154"; "_cylinder 1.73028,3.82949,2.88319 0.38551 1.15654"; "_-view o t"; "_subtract 1.33977,3.82949,2.87819  1.34477,3.82949,2.87819 "; "_mirror all  1.72028,2.93897 1.74028,2.93897 "; "_union all "; "-layer s 0"; "  "; "-layer f alumtanks"; "  "]
# [component: inputs AC_FlocTank]
# [component: inputs AC_SedTank]
# [component: inputs AC_ChemTanks]
AC_EntranceTank = [
    "-layer m entrancetank"; "c t 214,214,214"; "entrancetank"; "  "; "_-view o t _zoom w 2.32056,5.06,0.51527 1.14,6.24056,2.06291 _box 2.16056,5.22,0.51527 1.3,6.08056,2.06291 _box 2.31056,5.07,0.36527 1.15,6.23056,2.06291 _subtract 2.31056,5.07,0.36527  2.16056,5.22,0.51527 "; "-layer s 0"; "  "; "-layer f entrancetank"; "  "; "-layer s entrancetank"
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]
# [component: inputs AC_EntranceTank]
